<?xml version="1.0" encoding="UTF-8"?>

<neuroml xmlns="http://www.neuroml.org/schema/neuroml2"
         xmlns:xsi="http://www.w3.org/2001/XMLSchema-instance"
         xsi:schemaLocation="http://www.neuroml.org/schema/neuroml2 ../Schemas/NeuroML2/NeuroML_v2beta4.xsd"
         id="NML2_SingleCompHHCell">

    <ionChannel type="ionChannelPassive" id="passiveChan" conductance="10pS">
        <notes>Leak conductance</notes>
    </ionChannel>

    <cell id="passiveCell">

        <morphology id="morph1">
            <segment id="0" name="soma">
                <proximal x="0" y="0" z="0" diameter="17.841242"/> <!--Gives a convenient surface area of 1000.0 ?m�-->
                <distal x="0" y="0" z="0" diameter="17.841242"/>
            </segment>

            <segmentGroup id="soma_group">
                <member segment="0"/>
            </segmentGroup>

            <segmentGroup id="all">
                <member segment="0"/>
            </segmentGroup>

        </morphology>

        <biophysicalProperties id="bioPhys1">

            <membraneProperties>
                <channelDensity id="leak" ionChannel="passiveChan" condDensity="3.0 S_per_m2" erev="-54.3mV" ion="non_specific"/>
                <spikeThresh value="-20mV"/>
                <specificCapacitance value="1.0 uF_per_cm2"/>
                <initMembPotential value="-65mV"/>
            </membraneProperties>

            <intracellularProperties>
                <resistivity value="0.03 kohm_cm"/>   <!-- Note: not used in single compartment simulations -->
            </intracellularProperties>

        </biophysicalProperties>

    </cell>

</neuroml>
